a := 3
x := 2, 3..4  # error: Не удается распознать этот синтаксис.
y := 2, 3..4  # error: Не удается распознать этот синтаксис.
x := 2, 3, 4
y := 2, 3, 4
g(x, y) := if(a ≤ x, sum((3*x + y)/(3*(n1!)), n1 = 0 .. 3), sum(x^n2/(2*y^(n2 + 1) + x*n2), n2 = 0 .. 4))
g(2, 2) = 1.08275
g(4, 2) = 12.4444
g(4, 3) = 13.3333
g(2, 3) = 0.41564
g(4, 4) = 14.2222
g(2, 4) = 0.237353
g(4, 5) = 15.1111
g(2, 5) = 0.163136
g(5, 2) = 15.1111
g(3, 2) = 9.77778
g(5, 3) = 16
g(5, 4) = 16.8889
g(3, 4) = 11.5556
g(3, 5) = 12.4444
g(5, 5) = 17.7778
